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/batch
! ANSYS input file written by Workbench version 2021 R2
! File used for geometry attach: C:\Users\CJ\PycharmProjects\DesignOptimization2021Fall\Project\Project 2 Ansys\Project 2_dp1_files\dp1\Geom\DM\Geom.agdb
/title,Project 2_dp1--Transient Thermal (D5)
/com,--- Data in consistent NMM units. See Solving Units in the help system for more information.
/units,MPA
/prep7
! Turn off shape checking because checks already performed inside WB mesher.
! See help system for more information.
SHPP,OFF,,NOWARN
etcon,set             ! allow ANSYS to choose best KEYOP's for 180x elements, resets any applicable keyopt to MAPDL defaults
/com,*********** Nodes for the whole assembly ***********
nblock,3,,9218
(1i9,3e20.9e3)
        1    -1.040345886E-14     4.000000000E+01     8.495068837E+01
        2    -1.766224126E+01     4.000000000E+01     8.309431201E+01
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-1
/com,*********** Elements for Body 1 "Solid" ***********
et,1,291
eblock,19,solid,,4311
(19i9)
        1        1        1        1        0        0        0        0       10        0        1      906     1320     1416     1410     6468     8258     6472     6471
     8255     8380
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-1
/com,*********** Send User Defined Coordinate System(s) ***********
csys,0
toffst,273.15,  ! Temperature offset from absolute zero
/com,*********** Send Materials ***********
Temperature = 'TEMP' ! Temperature
MP,DENS,1,7.2e-09,	! tonne mm^-3
MP,ALPX,1,1.1e-05,	! C^-1
MP,C,1,447000000,	! mm^2 s^-2 C^-1
MP,KXX,1,52,	! tonne mm s^-3 C^-1
MP,RSVX,1,9.6e-05,	! ohm mm
MP,EX,1,110000,	! tonne s^-2 mm^-1
MP,NUXY,1,0.28,
MP,MURX,1,10000,

!************************* Model Summary ********************
!Solid,	Gray Cast Iron,	matid,	1
!************************* End Model Summary ********************
/com,*********** Create "Heat Flux" ***********
et,2,152
eblock,10,,,390
(15i9)
     6778        2        2        2        0      126      523      136      136     2345     2433      136     2341
     6779        2        2        2        0     1136     1147     1149     1149     7409     7447     1149     7410
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-1
esel,s,type,,2
keyop,2,8,1      ! include heat flux
/com,*********** Create "Heat Flux 2" ***********
et,3,152
eblock,10,,,372
(15i9)
     7168        3        3        3        0       36     1063     1065     1065     1644     6985     1065     1645
     7169        3        3        3        0      684      693     1064     1064     5607     5662     1064     5608
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-1
esel,s,type,,3
keyop,3,8,1      ! include heat flux
esel,all
fcum,add                   ! add nodal forces up (needed in case have loads on the same edge,vertex)
fcum                       ! reset default on fcum command since done sending WB F loads
/com,*********** Create "Convection" ***********
et,4,152
eblock,10,,,2466
(15i9)
     7540        4        4        4        0       41      651     1160     1160     1677     5456     1160     1680
     7541        4        4        4        0       62      672     1156     1156     1829     5541     1156     1832
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-1
esel,s,type,,4
keyop,4,8,2.
keyop,4,13,0
esel,all
/com,***************** Define Uniform Initial temperature ***************
tunif,35.
fini
/com,****************************************************************************
/com,*************************    SOLUTION       ********************************
/com,****************************************************************************
/solu
antype,4                   ! transient analysis
kbc,1                      ! stepped BC's
!eqsl,sparse               ! using sparse solver which is default so no eqsl command needed
cntr,print,1               ! print out contact info and also make no initial contact an error
rescontrol,,none                 ! Do not keep any restart files
dmpoption,emat,no             ! Don't combine emat file for DANSYS
dmpoption,esav,no             ! Don't combine esav file for DANSYS
thopt,quasi,5.e-002
nlhist,nsol,MAX_TEMP,temp,max
nlhist,nsol,MIN_TEMP,temp,min
/com,********* Initial Time Increment Check And Fourier Modulus *********
/com,****************************************************
/com,******************* SOLVE FOR LS 1 OF 5 ****************
esel,s,type,,2
nsle
sf,all,hflux,1539.5
esel,s,type,,3
nsle
sf,all,hflux,1539.5
nsel,all
esel,all
esel,s,type,,4
nsle
sf,all,conv,5.e-003,35.
nsel,all
esel,all
autots,on
nsub,100,1000,10
time,1.
timint,on                  ! Turn on time integration effects
outres,erase
outres,all,none
outres,nsol,all
outres,rsol,all
outres,eangl,all
outres,veng,all
outres,fflux,all
outres,cont,all
esel,s,type,,4
cm,_elmisc,elem
esel,all
outres,misc,all,_elmisc
cnvtol,heat,,.001,,1.e-003    ! Program Controlled. Set MINREF equivalent of 1e-6 Watts
! *********** WB SOLVE COMMAND ***********
! check interactive state
*get,ANSINTER_,active,,int
*if,ANSINTER_,ne,0,then
/eof
*endif
solve
/com *************** Write FE CONNECTORS *********
CEWRITE,file,ce,,INTE
/com,****************************************************
/com,*************** FINISHED SOLVE FOR LS 1 *************
/com,****************************************************
/com,******************* SOLVE FOR LS 2 OF 5 ****************
autots,on
nsub,100,1000,10
time,2.
timint,on                  ! Turn on time integration effects
outres,erase
outres,all,none
outres,nsol,all
outres,rsol,all
outres,eangl,all
outres,veng,all
outres,fflux,all
outres,cont,all
outres,misc,all,_elmisc
cnvtol,heat,,.001,,1.e-003    ! Program Controlled. Set MINREF equivalent of 1e-6 Watts
solve
/com,****************************************************
/com,*************** FINISHED SOLVE FOR LS 2 *************
/com,****************************************************
/com,******************* SOLVE FOR LS 3 OF 5 ****************
autots,on
nsub,100,1000,10
time,3.
timint,on                  ! Turn on time integration effects
outres,erase
outres,all,none
outres,nsol,all
outres,rsol,all
outres,eangl,all
outres,veng,all
outres,fflux,all
outres,cont,all
outres,misc,all,_elmisc
cnvtol,heat,,.001,,1.e-003    ! Program Controlled. Set MINREF equivalent of 1e-6 Watts
solve
/com,****************************************************
/com,*************** FINISHED SOLVE FOR LS 3 *************
/com,****************************************************
/com,******************* SOLVE FOR LS 4 OF 5 ****************
autots,on
nsub,100,1000,10
time,4.
timint,on                  ! Turn on time integration effects
outres,erase
outres,all,none
outres,nsol,all
outres,rsol,all
outres,eangl,all
outres,veng,all
outres,fflux,all
outres,cont,all
outres,misc,all,_elmisc
cnvtol,heat,,.001,,1.e-003    ! Program Controlled. Set MINREF equivalent of 1e-6 Watts
solve
/com,****************************************************
/com,*************** FINISHED SOLVE FOR LS 4 *************
/com,****************************************************
/com,******************* SOLVE FOR LS 5 OF 5 ****************
autots,on
nsub,100,1000,10
time,5.
timint,on                  ! Turn on time integration effects
outres,erase
outres,all,none
outres,nsol,all
outres,rsol,all
outres,eangl,all
outres,veng,all
outres,fflux,all
outres,cont,all
outres,misc,all,_elmisc
cnvtol,heat,,.001,,1.e-003    ! Program Controlled. Set MINREF equivalent of 1e-6 Watts
solve
/com,****************************************************
/com,*************** FINISHED SOLVE FOR LS 5 *************
/post1
fini
